<?xml version="1.0"?>
<?xml-stylesheet type="text/xsl" href="http://jsbsim.sourceforge.net/JSBSim.xsl"?>
<fdm_config name="Peep-tweet" version="1.0" release="BETA"
   xmlns:xsi="http://www.w3.org/2001/XMLSchema-instance"
   xsi:noNamespaceSchemaLocation="http://jsbsim.sourceforge.net/JSBSim.xsd">

 <fileheader>
  <author> Aeromatic v 0.9 </author>
  <filecreationdate> 20011-18-11 </filecreationdate>
  <version> 1.0 </version>
  <description> Models a Cessna 421 Tweet conversion. </description>
 </fileheader>

<!--
  File:     Peep-tweet.xml
  Inputs:
    name:          Cessna 421-Tweet experimental STOL
    type:          8 seater STOL passenger plane
    max weight:    9870 lb
    wing span:     42.6 ft
    length:        31.25 ft
    wing area:     266 sq-ft
    gear type:     tricycle
    retractable?:  yes
    # engines:     2
    engine type:   turbofan
    engine layout: wing-root
    yaw damper?    no

  Outputs:
    wing loading:  37.105 lb/sq-ft
    CL-alpha:      5 per radian
    CL-0:          0.25
    CL-max:        1.4
    CD-0:          0.028
    K:             0.04

-->

<metrics>
   <wingarea  unit="FT2">  268.00 </wingarea>
   <wingspan  unit="FT" >   42.90 </wingspan>
   <wing_incidence>          2.00 </wing_incidence>
   <chord     unit="FT" >    6.68 </chord>
   <htailarea unit="FT2">   115.00 </htailarea>
   <htailarm  unit="FT" >   17.85 </htailarm>
   <vtailarea unit="FT2">   57.90 </vtailarea>
   <vtailarm  unit="FT" >   19.50 </vtailarm>
   <location name="AERORP" unit="IN">
     <x>  -2.0 </x>
     <y>   0.00 </y>
     <z>   -2.25 </z>
   </location>
   <location name="EYEPOINT" unit="IN">
     <x>  0.00 </x>
     <y>   0.00 </y>
     <z>  0.00 </z>
   </location>
   <location name="VRP" unit="IN">
     <x> 18.0</x>
     <y>0</y>
     <z> 6.00</z>
   </location>
 </metrics>

<mass_balance>
   <ixx unit="SLUG*FT2">      6200 </ixx>
   <iyy unit="SLUG*FT2">      9000 </iyy>
   <izz unit="SLUG*FT2">     11500 </izz>
   <emptywt unit="LBS" >      5215 </emptywt>
   <location name="CG" unit="IN">
     <x>   -9.0 </x>
     <y>   0.00 </y>
     <z>   0.00 </z>
   </location>
 </mass_balance>

 <pointmass name="Pilot">
        <weight unit="LBS"> 185 </weight>
        <location unit="IN">
            <x> -50.00 </x>
            <y> -0.60 </y>
            <z> -21.05 </z>
        </location>
    </pointmass>

<pointmass name="Co-Pilot">
        <weight unit="LBS"> 185 </weight>
        <location unit="IN">
            <x> -50.00 </x>
            <y> 0.60 </y>
            <z> -21.05 </z>
        </location>
    </pointmass>

 <ground_reactions>

  <contact type="BOGEY" name="NOSE">
   <location unit="IN">
     <x>  -129.25 </x>
     <y>   0.00 </y>
     <z> -41.00 </z>
   </location>
   <static_friction>  0.80 </static_friction>
   <dynamic_friction> 0.50 </dynamic_friction>
   <rolling_friction> 0.08 </rolling_friction>
   <spring_coeff unit="LBS/FT">       3400.00 </spring_coeff>
   <damping_coeff unit="LBS/FT/SEC">  829.00 </damping_coeff>
   <max_steer unit="DEG"> 40.00 </max_steer>
   <brake_group>NONE</brake_group>
   <retractable>1</retractable>
 </contact>

  <contact type="BOGEY" name="LEFT_MAIN">
   <location unit="IN">
     <x> 14.00 </x>
     <y> -92.30 </y>
     <z> -39.5.00 </z>
   </location>
   <static_friction>  0.80 </static_friction>
   <dynamic_friction> 0.50 </dynamic_friction>
   <rolling_friction> 0.08 </rolling_friction>
   <spring_coeff unit="LBS/FT">        7300.00 </spring_coeff>
   <damping_coeff unit="LBS/FT/SEC">  1500.00 </damping_coeff>
   <brake_group>LEFT</brake_group>
   <retractable>1</retractable>
 </contact>

  <contact type="BOGEY" name="RIGHT_MAIN">
   <location unit="IN">
     <x>  14.00 </x>
     <y> 92.30 </y>
     <z> -39.5.00 </z>
   </location>
   <static_friction>  0.80 </static_friction>
   <dynamic_friction> 0.50 </dynamic_friction>
   <rolling_friction> 0.04 </rolling_friction>
   <spring_coeff unit="LBS/FT">      7300.00 </spring_coeff>
   <damping_coeff unit="LBS/FT/SEC">  1500.00 </damping_coeff>
   <brake_group>RIGHT</brake_group>
   <retractable>1</retractable>
 </contact>

 <contact type="STRUCTURE" name="LEFT_WING">
    <location unit="IN">
     <x> -1.00 </x>
     <y>-258.50 </y>
     <z> 1.0 </z>
    </location>
    <static_friction>  1 </static_friction>
    <dynamic_friction> 1 </dynamic_friction>
    <spring_coeff unit="LBS/FT">      8000.00 </spring_coeff>
    <damping_coeff unit="LBS/FT/SEC"> 8000.00 </damping_coeff>
    <damping_coeff_rebound unit="LBS/FT/SEC">80000.00 </damping_coeff_rebound>
 </contact>

  <contact type="STRUCTURE" name="RIGHT_WING">
    <location unit="IN">
     <x> -1.00 </x>
     <y> 258.50 </y>
     <z> 1.0 </z>
    </location>
    <static_friction>  1 </static_friction>
    <dynamic_friction> 1 </dynamic_friction>
    <spring_coeff unit="LBS/FT">      8000.00 </spring_coeff>
    <damping_coeff unit="LBS/FT/SEC"> 8000.00 </damping_coeff>
    <damping_coeff_rebound unit="LBS/FT/SEC">80000.00 </damping_coeff_rebound>
 </contact>

  <contact type="STRUCTURE" name="AFT_FUSELAGE">
    <location unit="IN">
     <x> 201 </x>
     <y>   0 </y>
     <z>   19 </z>
    </location>
    <static_friction>  1 </static_friction>
    <dynamic_friction> 1 </dynamic_friction>
    <spring_coeff unit="LBS/FT">      8000.00 </spring_coeff>
    <damping_coeff unit="LBS/FT/SEC"> 8000.00 </damping_coeff>
    <damping_coeff_rebound unit="LBS/FT/SEC">80000.00 </damping_coeff_rebound>
 </contact>

  <contact type="STRUCTURE" name="FWD_FUSELAGE">
    <location unit="IN">
     <x>  -152 </x>
     <y>   0 </y>
     <z>   -1.0 </z>
    </location>
    <static_friction>  1 </static_friction>
    <dynamic_friction> 1 </dynamic_friction>
    <spring_coeff unit="LBS/FT">      8000.00 </spring_coeff>
    <damping_coeff unit="LBS/FT/SEC"> 8000.00 </damping_coeff>
    <damping_coeff_rebound unit="LBS/FT/SEC">50000.00 </damping_coeff_rebound>
 </contact>

 </ground_reactions>

 <propulsion>

   <engine file="Garret-TFE751">
    <location unit="IN">
      <x> -11.00 </x>
      <y> -39.00 </y>
      <z>  0.00 </z>
    </location>
    <feed>0</feed>
    <feed>1</feed>
    <feed>2</feed>
    <thruster file="direct">
     <location unit="IN">
       <x> 17.00 </x>
       <y> -39.40 </y>
       <z>  0.00 </z>
     </location>
     <orient unit="DEG">
       <pitch> 1.00 </pitch>
       <roll>  0.00 </roll>
       <yaw>   0.00 </yaw>
     </orient>
    </thruster>
  </engine>

   <engine file="Garret-TFE751">
    <location unit="IN">
      <x> -11.00 </x>
      <y>  39.40 </y>
      <z>  0.00 </z>
    </location>
    <feed>0</feed>
    <feed>1</feed>
    <feed>2</feed>
    <thruster file="direct">
     <location unit="IN">
       <x>  17.00 </x>
       <y>  39.00 </y>
       <z>  0.00 </z>
     </location>
     <orient unit="DEG">
       <pitch> 1.00 </pitch>
       <roll>  0.00 </roll>
       <yaw>   0.00 </yaw>
     </orient>
    </thruster>
  </engine>

  <!-- internal fuel -->
  <tank type="FUEL" number="0">
     <location unit="IN">
       <x> 12.00 </x>
       <y>   0.00 </y>
       <z>   -5.10 </z>
     </location>
     <priority>2</priority>
     <capacity unit="LBS"> 3003.00 </capacity>
     <contents unit="LBS"> 2970.00 </contents>
     <standpipe unit="LBS"> 0.00 </standpipe>
  </tank>

  <!-- left external fuel tank -->
  <tank type="FUEL" number="1">
     <location unit="IN">
       <x> -5.00 </x>
       <y>-219.00 </y>
       <z>   0.00 </z>
     </location>
     <capacity unit="LBS"> 190 </capacity>
     <contents unit="LBS"> 0 </contents>
  </tank>

  <!-- right external fuel tank -->
  <tank type="FUEL" number="2">
     <location unit="IN">
       <x> -5.00 </x>
       <y> 219.00 </y>
       <z>   0.00 </z>
     </location>
     <capacity unit="LBS"> 190 </capacity>
     <contents unit="LBS"> 0 </contents>
  </tank>

 </propulsion>

 <system file="over-g"/>
 <system file="crash-detect"/>
 <system file="beacon"/>
 <system file="alpha_buffet"/>

 <flight_control name="FCS: Peep-tweet">

   <channel name="Pitch">
   <summer name="Pitch Trim Sum">
      <input>fcs/elevator-cmd-norm</input>
      <input>fcs/pitch-trim-cmd-norm</input>
      <clipto>
        <min> -1 </min>
        <max>  1 </max>
      </clipto>
   </summer>

   <aerosurface_scale name="Elevator Control">
      <input>fcs/pitch-trim-sum</input>
      <range>
        <min> -0.35 </min>
        <max>  0.35 </max>
      </range>
      <output>fcs/elevator-pos-rad</output>
   </aerosurface_scale>

   <aerosurface_scale name="elevator normalization">
      <input>fcs/elevator-pos-rad</input>
      <domain>
        <min> -0.6 </min>
        <max>  0.6 </max>
      </domain>
      <range>
        <min> -1.15 </min>
        <max>  1.15 </max>
      </range>
      <output>fcs/elevator-pos-norm</output>
   </aerosurface_scale>

   <aerosurface_scale name="Thrust Vectoring">
       <input>fcs/flap-pos-norm</input>
       <range>
        <min> 0.0 </min>
        <max> -0.120 </max>
       </range>
       <output>propulsion/engine[0]/pitch-angle-rad</output>
   </aerosurface_scale>

   <aerosurface_scale name="Thrust Vectoring">
       <input>fcs/flap-pos-norm</input>
       <range>
        <min> 0.0 </min>
        <max> -0.120 </max>
       </range>
       <output>propulsion/engine[1]/pitch-angle-rad</output>
    </aerosurface_scale>

  </channel>

  <channel name="Roll">
   <summer name="Roll Trim Sum">
      <input>fcs/aileron-cmd-norm</input>
      <input>fcs/roll-trim-cmd-norm</input>
      <clipto>
        <min> -1 </min>
        <max>  1 </max>
      </clipto>
   </summer>

   <aerosurface_scale name="Left Aileron Control">
      <input>fcs/roll-trim-sum</input>
      <range>
        <min> -0.35 </min>
        <max>  0.35 </max>
      </range>
      <output>fcs/left-aileron-pos-rad</output>
   </aerosurface_scale>

   <aerosurface_scale name="Right Aileron Control">
      <input>fcs/roll-trim-sum</input>
      <range>
        <min> -0.35 </min>
        <max>  0.35 </max>
      </range>
      <output>fcs/right-aileron-pos-rad</output>
   </aerosurface_scale>

   <aerosurface_scale name="left aileron normalization">
      <input>fcs/left-aileron-pos-rad</input>
      <domain>
        <min> -0.35 </min>
        <max>  0.35 </max>
      </domain>
      <range>
        <min> -1 </min>
        <max>  1 </max>
      </range>
      <output>fcs/left-aileron-pos-norm</output>
   </aerosurface_scale>

   <aerosurface_scale name="right aileron normalization">
      <input>fcs/right-aileron-pos-rad</input>
      <domain>
        <min> -0.35 </min>
        <max>  0.35 </max>
      </domain>
      <range>
        <min> -1 </min>
        <max>  1 </max>
      </range>
      <output>fcs/right-aileron-pos-norm</output>
   </aerosurface_scale>

  </channel>

  <channel name="Yaw">
   <summer name="Rudder Command Sum">
      <input>fcs/rudder-cmd-norm</input>
      <input>fcs/yaw-trim-cmd-norm</input>
      <clipto>
        <min> -0.35 </min>
        <max>  0.35 </max>
      </clipto>
   </summer>

   <aerosurface_scale name="Rudder Control">
      <input>fcs/rudder-command-sum</input>
      <range>
        <min> -0.35 </min>
        <max>  0.35 </max>
      </range>
      <output>fcs/rudder-pos-rad</output>
   </aerosurface_scale>

   <aerosurface_scale name="rudder normalization">
      <input>fcs/rudder-pos-rad</input>
      <domain>
        <min> -0.35 </min>
        <max>  0.35 </max>
      </domain>
      <range>
        <min> -1 </min>
        <max>  1 </max>
      </range>
      <output>fcs/rudder-pos-norm</output>
   </aerosurface_scale>

  </channel>

  <channel name="Flaps">
   <kinematic name="Flaps Control">
     <input>fcs/flap-cmd-norm</input>
     <traverse>
       <setting>
          <position>  0 </position>
          <time>      0 </time>
       </setting>
       <setting>
          <position> 7.5 </position>
          <time>      3 </time>
       </setting>
       <setting>
          <position> 15 </position>
          <time>      3 </time>
       </setting>
       <setting>
          <position> 22.5 </position>
          <time>      3 </time>
       </setting>
       <setting>
          <position> 30 </position>
          <time>      3 </time>
       </setting>
     </traverse>
     <output>fcs/flap-pos-deg</output>
   </kinematic>

   <aerosurface_scale name="flap normalization">
      <input>fcs/flap-pos-deg</input>
      <domain>
        <min>  0 </min>
        <max> 30 </max>
      </domain>
      <range>
        <min> 0 </min>
        <max> 1 </max>
      </range>
      <output>fcs/flap-pos-norm</output>
   </aerosurface_scale>

  </channel>
  <channel name="Landing Gear">
   <kinematic name="Gear Control">
     <input>gear/gear-cmd-norm</input>
     <traverse>
       <setting>
          <position> 0 </position>
          <time>     0 </time>
       </setting>
       <setting>
          <position> 1 </position>
          <time>     6 </time>
       </setting>
     </traverse>
     <output>gear/gear-pos-norm</output>
   </kinematic>

  </channel>

  <channel name="Speedbrake">
   <kinematic name="Speedbrake Control">
     <input>fcs/speedbrake-cmd-norm</input>
     <traverse>
       <setting>
          <position> 0 </position>
          <time>     0 </time>
       </setting>
       <setting>
          <position> 1 </position>
          <time>     1 </time>
       </setting>
       <location unit="IN">
       <x>   47.3 </x>
       <y>   0.00 </y>
       <z>   -16.33 </z>
     </location>
     </traverse>
     <output>fcs/speedbrake-pos-norm</output>
   </kinematic>

  </channel>

 </flight_control>

 <aerodynamics>

  <alphalimits unit="DEG">
   <min>-8.0</min>
   <max>15.0</max>
  </alphalimits>

  <hysteresis_limits unit="DEG">
   <min> 10.0</min>
   <max>19.0</max>
  </hysteresis_limits>

  <function name="aero/function/ground-effect-factor-lift">
   <description>Change in lift due to ground effect factor</description>
   <product>
    <table>
     <independentVar lookup="row">aero/h_b-mac-ft</independentVar>
     <tableData>
        0.0  1.507
        0.1  1.447
        0.15 1.405
        0.2  1.303
        0.3  1.206
        0.4  1.085
        0.5  1.059
        0.6  1.03
        0.7  1.018
        0.8  1.006
        0.9  1.003
        1.0  1.002
        1.1  1.0
     </tableData>
    </table>
   </product>
  </function>

  <function name="aero/function/ground-effect-factor-drag">
   <description>Change in drag due to ground effect</description>
   <product>
    <table>
     <independentVar lookup="row">aero/h_b-mac-ft</independentVar>
     <tableData>
        0.0  0.580
        0.1  0.6015
        0.15 0.69
        0.2  0.759
        0.3  0.815
        0.4  0.882
        0.5  0.928
        0.6  0.962
        0.7  0.988
        0.8  1.0
        0.9  1.0
        1.0  1.0
        1.1  1.0
     </tableData>
    </table>
   </product>
  </function>

  <axis name="LIFT">

    <function name="aero/force/Lift_alpha">
      <description>Lift due to alpha</description>
      <product>
          <property>aero/qbar-psf</property>
          <property>metrics/Sw-sqft</property>
          <table>
            <independentVar lookup="row">aero/alpha-rad</independentVar>
            <tableData>
              -0.2793        -1.158
              -0.1396        -0.68
              -0.1047        -0.442
              -0.0698        -0.286
              -0.0349        -0.121
              -0.017         0.030
               0.000         0.080
               0.01745       0.140
               0.03491       0.186
               0.0428        0.225
               0.0523        0.274
               0.06981        0.350
               0.1047         0.465
               0.1396         0.608
               0.1745         0.762
               0.1918         0.929
               0.2443         1.05
               0.2793         1.12
               0.3142         0.993
               0.3316         0.904
               0.3491         0.819
               0.3665         0.737
               0.3840         0.483
               0.436          0.367
            </tableData>
          </table>
      </product>
    </function>

    <function name="aero/force/Lift_flap">
       <description>Delta Lift due to flaps</description>
       <product>
           <property>aero/qbar-psf</property>
           <property>metrics/Sw-sqft</property>
           <property>fcs/flap-pos-deg</property>
           <value>0.034</value>
       </product>
    </function>

    <function name="aero/force/Lift_speedbrake">
       <description>Delta Lift due to speedbrake</description>
       <product>
           <property>aero/qbar-psf</property>
           <property>metrics/Sw-sqft</property>
           <property>fcs/speedbrake-pos-norm</property>
           <value>0.0001</value>
       </product>
    </function>

    <function name="aero/force/Lift_elevator">
       <description>Lift due to Elevator Deflection</description>
       <product>
           <property>aero/qbar-psf</property>
           <property>metrics/Sw-sqft</property>
           <property>fcs/elevator-pos-rad</property>
           <value>0.23</value>
       </product>
    </function>

  </axis>

  <axis name="DRAG">

    <function name="aero/coefficient/CD0">
       <description>Drag_at_zero_lift</description>
       <product>
          <property>aero/qbar-psf</property>
          <property>metrics/Sw-sqft</property>
          <table>
            <independentVar lookup="row">aero/alpha-rad</independentVar>
            <tableData>
        -0.0872664   0.0507143
        -0.0698132   0.013424
        -0.0523599   0.008954
        -0.0349066   0.00313268
        -0.0174533   0.0027318
         0           0.0051894
         0.0174533   0.00993967
         0.0349066   0.0162201
         0.0523599   0.0240308
         0.0698132   0.0333717
         0.0872664   0.0442427
         0.10472     0.056644
         0.122173    0.0705754
         0.139626    0.086037
         0.15708     0.096239
         0.174533    0.106859
         0.191986    0.118034
         0.209439    0.129765
         0.226893    0.142366
         0.244346    0.156452
         0.261799    0.172732
         0.279253    0.178209
         0.296706    0.171598
         0.314159    0.161786
         0.331613    0.147493
         0.349066    0.109678
            </tableData>
          </table>
       </product>
    </function>

    <function name="aero/coefficient/CDi">
       <description>Induced_drag</description>
         <product>
           <property>aero/qbar-psf</property>
           <property>metrics/Sw-sqft</property>
           <property>aero/cl-squared</property>
           <value>0.09</value>
         </product>
    </function>

    <function name="aero/coefficient/CDmach">
       <description>Drag_due_to_mach</description>
        <product>
          <property>aero/qbar-psf</property>
          <property>metrics/Sw-sqft</property>
          <table>
            <independentVar lookup="row">velocities/mach</independentVar>
            <tableData>
                0.00      0.000
                0.58      0.008
                0.740      0.028
                0.89      0.115
            </tableData>
          </table>
        </product>
    </function>

    <function name="aero/coefficient/CDflap">
       <description>Drag_due_to_flaps</description>
         <product>
           <property>aero/qbar-psf</property>
           <property>metrics/Sw-sqft</property>
           <property>fcs/flap-pos-norm</property>
           <value> 0.079 </value>
         </product>
    </function>

    <function name="aero/coefficient/CDgear">
       <description>Drag_due_to_gear</description>
         <product>
           <property>aero/qbar-psf</property>
           <property>metrics/Sw-sqft</property>
           <property>gear/gear-pos-norm</property>
           <value>0.059</value>
         </product>
    </function>

    <function name="aero/coefficient/CDsb">
       <description>Drag_due_to_speedbrakes</description>
         <product>
           <property>aero/qbar-psf</property>
           <property>metrics/Sw-sqft</property>
           <property>fcs/speedbrake-pos-norm</property>
           <value>0.00</value>
         </product>
    </function>

    <function name="aero/coefficient/CDbeta">
       <description>Drag_due_to_sideslip</description>
       <product>
          <property>aero/qbar-psf</property>
          <property>metrics/Sw-sqft</property>
          <table>
            <independentVar lookup="row">aero/beta-rad</independentVar>
            <tableData>
              -1.57    1.230
              -0.26    0.050
               0.00    0.000
               0.26    0.050
               1.57    1.230
            </tableData>
          </table>
       </product>
    </function>

    <function name="aero/coefficient/CDde">
       <description>Drag_due_to_Elevator_Deflection</description>
       <product>
           <property>aero/qbar-psf</property>
           <property>metrics/Sw-sqft</property>
           <abs><property>fcs/elevator-pos-norm</property></abs>
           <value>0.019</value>
       </product>
    </function>

  </axis>

  <axis name="SIDE">

    <function name="aero/coefficient/CYb">
       <description>Side_force_due_to_beta</description>
       <product>
           <property>aero/qbar-psf</property>
           <property>metrics/Sw-sqft</property>
           <property>aero/beta-rad</property>
           <value>-1</value>
       </product>
    </function>

  </axis>

  <axis name="ROLL">

    <function name="aero/coefficient/Clb">
       <description>Roll_moment_due_to_beta</description>
       <product>
           <property>aero/qbar-psf</property>
           <property>metrics/Sw-sqft</property>
           <property>metrics/bw-ft</property>
           <property>aero/beta-rad</property>
           <value>-0.03</value>
       </product>
    </function>

    <function name="aero/coefficient/Clp">
       <description>Roll_moment_due_to_roll_rate</description>
       <product>
           <property>aero/qbar-psf</property>
           <property>metrics/Sw-sqft</property>
           <property>metrics/bw-ft</property>
           <property>aero/bi2vel</property>
           <property>velocities/p-aero-rad_sec</property>
           <value>-0.4</value>
       </product>
    </function>

    <function name="aero/coefficient/Clr">
       <description>Roll_moment_due_to_yaw_rate</description>
       <product>
           <property>aero/qbar-psf</property>
           <property>metrics/Sw-sqft</property>
           <property>metrics/bw-ft</property>
           <property>aero/bi2vel</property>
           <property>velocities/r-aero-rad_sec</property>
           <value>0.15</value>
       </product>
    </function>

    <function name="aero/coefficient/Clda">
       <description>Roll_moment_due_to_aileron</description>
       <product>
          <property>aero/qbar-psf</property>
          <property>metrics/Sw-sqft</property>
          <property>metrics/bw-ft</property>
          <property>fcs/left-aileron-pos-rad</property>
          <table>
            <independentVar lookup="row">velocities/mach</independentVar>
            <tableData>
              0.0    0.110
              2.0    0.037
            </tableData>
          </table>
       </product>
    </function>

    <function name="aero/coefficient/Cldr">
       <description>Roll_moment_due_to_rudder</description>
       <product>
           <property>aero/qbar-psf</property>
           <property>metrics/Sw-sqft</property>
           <property>metrics/bw-ft</property>
           <property>fcs/rudder-pos-rad</property>
           <value>0.006</value>
       </product>
    </function>

  </axis>

  <axis name="PITCH">

            <function name="aero/coefficient/Cmgear">
                <description>Pitch_moment_due_to_gear</description>
                <product>
                    <property>aero/qbar-psf</property>
                    <property>metrics/Sw-sqft</property>
                    <property>metrics/cbarw-ft</property>
                    <property>gear/gear-pos-norm</property>
                    <value>-0.0030</value>
                </product>
            </function>

    <function name="aero/coefficient/Cmalpha">
       <description>Pitch_moment_due_to_alpha</description>
       <product>
           <property>aero/qbar-psf</property>
           <property>metrics/Sw-sqft</property>
           <property>metrics/cbarw-ft</property>
           <property>aero/alpha-rad</property>
           <value>-0.20</value>
       </product>
    </function>

    <function name="aero/coefficient/Cmde">
       <description>Pitch_moment_due_to_elevator</description>
       <product>
          <property>aero/qbar-psf</property>
          <property>metrics/Sw-sqft</property>
          <property>metrics/cbarw-ft</property>
          <property>fcs/elevator-pos-rad</property>
          <table>
            <independentVar lookup="row">velocities/mach</independentVar>
            <tableData>
              0.0     -0.480
              1.0     -0.290
            </tableData>
          </table>
       </product>
    </function>

<function name="aero/coefficient/Cmdflap">
       <description>Pitch_moment_due_to_flaps</description>
       <product>
          <property>aero/qbar-psf</property>
          <property>metrics/Sw-sqft</property>
          <property>metrics/cbarw-ft</property>
          <property>fcs/flap-pos-rad</property>
          <table>
            <independentVar lookup="row">velocities/mach</independentVar>
            <tableData>
              0.0     0.00
              1.0     -0.090
            </tableData>
          </table>
       </product>
    </function>

    <function name="aero/coefficient/Cmq">
       <description>Pitch_moment_due_to_pitch_rate</description>
       <product>
           <property>aero/qbar-psf</property>
           <property>metrics/Sw-sqft</property>
           <property>metrics/cbarw-ft</property>
           <property>aero/ci2vel</property>
           <property>velocities/q-aero-rad_sec</property>
           <value>-13</value>
       </product>
    </function>

    <function name="aero/coefficient/Cmadot">
       <description>Pitch_moment_due_to_alpha_rate</description>
       <product>
           <property>aero/qbar-psf</property>
           <property>metrics/Sw-sqft</property>
           <property>metrics/cbarw-ft</property>
           <property>aero/ci2vel</property>
           <property>aero/alphadot-rad_sec</property>
           <value>-9</value>
       </product>
    </function>

  </axis>

  <axis name="YAW">

    <function name="aero/coefficient/Cnb">
       <description>Yaw_moment_due_to_beta</description>
       <product>
           <property>aero/qbar-psf</property>
           <property>metrics/Sw-sqft</property>
           <property>metrics/bw-ft</property>
           <property>aero/beta-rad</property>
           <value>0.10</value>
       </product>
    </function>

    <function name="aero/coefficient/Cnr">
       <description>Yaw_moment_due_to_yaw_rate</description>
       <product>
           <property>aero/qbar-psf</property>
           <property>metrics/Sw-sqft</property>
           <property>metrics/bw-ft</property>
           <property>aero/bi2vel</property>
           <property>velocities/r-aero-rad_sec</property>
           <value>-0.15</value>
       </product>
    </function>

    <function name="aero/coefficient/Cndr">
       <description>Yaw_moment_due_to_rudder</description>
       <product>
           <property>aero/qbar-psf</property>
           <property>metrics/Sw-sqft</property>
           <property>metrics/bw-ft</property>
           <property>fcs/rudder-pos-rad</property>
           <value>-0.03</value>
       </product>
    </function>

  </axis>

 </aerodynamics>

</fdm_config>
